19/05/2022
13:37
;; 1. Based on: run16
;; 2. Description: Minimal PBPK from Jusko - defix plasma - fit cerveau - fd fix
;; x1. Author: user
$PROBLEM    PBPK Critically ill patients metronidazole study
$INPUT      ID TIME TAD TIN CONC=DROP DV LNCO=DROP LNCU=DROP FU AMT II
            ADDL RATE EVID CMT VDVE QDVE AGE SEX HT WT SALB=DROP
            SPRO=DROP CRCL DIAG=DROP STUD FLAG
$DATA      metronidazole_QDVEind.csv IGNORE=#
$SUBROUTINE ADVAN13 TOL=9
;$PRIOR      NWPRI NTHETA=12 NETA=6 NTHP=3 NETP=0 NPEXP=1
$MODEL      NCOMP=7 COMP=(CENTRAL,DEFDOSE) ; 1- Plasma
            COMP=(RES) ; 2- Rest
            COMP=(BVAS) ; 3- Brain vasculature
            COMP=(ECF) ; 4- Extracellular fluid
            COMP=(MICRO) ; 5- Dialysate
            COMP=(CSF) ; 6- Cerebrospinal fluid
            COMP=(DVE) ; 7- DVE
$PK

;; --------------------------- Parameters estimated ---------------------------- ;;
TVKRES   	= THETA(1)
KRES     	= TVKRES*EXP(ETA(1))

TVCL10   	= THETA(2)
CL10     	= TVCL10*EXP(ETA(2))

TVfd		= THETA(3)
fd			= TVfd*EXP(ETA(3))		;fraction of CO for the rest compartment

TVVBLO		= THETA(4)
VBLO		= TVVBLO*EXP(ETA(4))

TVCO		= THETA(5)
CO			= TVCO*EXP(ETA(5))

TVPS1     = THETA(6)
PS1       = TVPS1*EXP(ETA(6))

TVPS2     = THETA(7)
PS2       = TVPS2*EXP(ETA(7))

QCSFOUT = 0
IF (STUD.EQ.1) QCSFOUT = 0.024
IF (STUD.EQ.2.AND.QDVE.LT.0.024) QCSFOUT = 0.024-QDVE				;patients LCR

;; ------------------------- Physiological parameters -------------------------- ;;
; Volumes:
VBVAS = 0.0637                            	;; Brain vascular volume L (paper from Ball K)
;VBLO  = 5.85			                   	;; Blood volume L (Brown et al. Physiological parameter values for physiologically based pharmacokinetic models. Toxicol. Ind. Health 13, 407−84)
VECF  = 0.24			                   	;; ECF brain tissue volume L (Westerhout et al)
VVENT = 0.130                            	;; CSF volume L (Gaohua et al, Drug Metabolism and Pharmacokinetics Volume 31, Issue 3, June 2016, Pages 224-233)
VRES  = WT-(VBLO+VBVAS+VECF+VVENT)			;; Rest volume L

; Blood flows:
;CO   = 312			             			;; Cardiac output L/h (Brown et al.)
QBRA = 42				           			;; Brain blood flow L/h (paper from Ball K)
QRES = fd*CO                    			;; Rest blood flow
QECF = 0.0105 	                 			;; Bulk flow : flow rate from ECF to CSF (Westerhout et al)
RBP  = 0.8                         			;; blood/plasma ratio (simcyp predictions)

$DES
;; ------------------------- Compartment concentrations ----------------------- ;;
C1 = A(1)/VBLO                                       ;; AMT/Blood  volume
Cplasma = C1/RBP									 ;; Conc plasma
C2 = A(2)/VRES                                       ;; AMT/Plasma rest tissue volume
C3 = A(3)/VBVAS                                      ;; AMT/Brain vascular volume
C4 = A(4)/VECF                                       ;; AMT/Brain ECF volume
C5 = A(5)/TIN										 ;; Conc dialysate
C6 = A(6)/VVENT                                      ;; AMT/CSF ventricle volume
C7 = A(7)/(VDVE+0.000001)							 ;; Conc dve
;; -------------------------- Differential equations -------------------------- ;;
DADT(1)= (C2*QRES/KRES) + C3*QBRA - C1*(QRES+CL10+QBRA)
DADT(2)= (C1*QRES) - (C2*QRES/KRES)

DADT(3)= (C1-C3)*QBRA + C4*PS1 + C6*(PS2+QCSFOUT) - C3*(PS1+PS2)

DADT(4)=  C3*PS1 - C4*(PS1+QECF)
DADT(5) = C4

DADT(6)=  C3*PS2 + (C4*QECF) - C6*(QCSFOUT+PS2) - C6*QDVE
DADT(7)=  C6*QDVE

$ERROR

AA1 = A(1)			;; AMT/Plasma
AA2 = A(2)			;; AMT/Rest
AA3 = A(3)			;; AMT/Brain vasculature
AA4 = A(4)			;; AMT/ECFV
AA5 = A(5)			;; AMT/ECFI
AA6 = A(6)			;; AMT/CSF
AA7 = A(7)			;; AMT/DVE

	IPRED = A(1)/(VBLO*RBP)
		IF(CMT.EQ.5)    IPRED = (A(5)/TIN)
		IF(CMT.EQ.7)    IPRED = (A(7)/(VDVE+0.000001))

	W = SQRT(SIGMA(1)*IPRED**2 + SIGMA(2))
		IF(CMT.EQ.5)    W = SQRT(SIGMA(3)*IPRED**2)
		IF(CMT.EQ.7)    W = SQRT(SIGMA(4)*IPRED**2)
		IF(W.EQ.0) 		W = 1

	IRES  = DV-IPRED
    IWRES = IRES/W

    RESV = EPS(1)
    IF(CMT.EQ.5) RESV = EPS(3)
    IF(CMT.EQ.7) RESV = EPS(4)

	RESV2 = 0
    IF(CMT.EQ.1) RESV2 = EPS(2)


     Y = IPRED + IPRED*RESV + RESV2

;; ------------------------- Initial estimates THETA -------------------------- ;;
$THETA  (0,0.796,1) ; 1 ~KRES
 (0,7.28,100) ; 2 ~CL10
 (0,0.86,1) FIX ; 3 ~fd
 5.85 FIX ; 4 ~VBLO
 312 FIX ; 5 ~CO
 (0,6.4) FIX ; 6 ~PS1
 (0,3.2) FIX ; 7 ~PS2
$OMEGA  0  FIX  ;  1 ~IIV_Kp
$OMEGA  0.124  ; 2 ~IIV_CL10
$OMEGA  0  FIX  ;  3 ~IIV_fd
$OMEGA  0  FIX  ; 4 ~IIV_VBLO
$OMEGA  0  FIX  ;  5 ~IIV_CO
$OMEGA  0  FIX  ; 6 ~IIV_PS1
$OMEGA  0  FIX  ; 7 ~IIV_PS2
;; --------------------------- Initial estimates SIGMA ------------------------- ;;
$SIGMA  0.0207  ; 1 ~Plasma Prop RES_ERR
$SIGMA  1.18  ; 2 ~Plasma Add RES_ERR
$SIGMA  0.0517  ; 3 ~ECF Prop RES_ERR
$SIGMA  0.079  ; 4 ~DVE Prop RES_ERR
$ESTIMATION METHOD=1 INTER PRINT=1 MAX=9999 POSTHOC NOABORT
$COVARIANCE PRINT=E
$TABLE      ID TIME TAD TIN EVID CMT FLAG DV PRED IPRED IRES WRES
            IWRES CWRES NOPRINT ONEHEADER FILE=sdtab22
;$TABLE ID AGE HT WT SALB SPRO CRCL NOPRINT ONEHEADER NOAPPEND FILE=cotab22

;$TABLE ID SEX DIAG STUD NOPRINT ONEHEADER NOAPPEND FILE=catab22
$TABLE      ID TIME TAD TIN EVID CMT KRES CL10 fd VDVE NOPRINT
            ONEHEADER NOAPPEND FILE=patab22
$TABLE      ID TIME TAD CMT EVID C1 Cplasma C2 C3 C4 C5 C6 C7 NOPRINT
            ONEHEADER FILE=mytab22

NM-TRAN MESSAGES
 WARNINGS AND ERRORS (IF ANY) FOR PROBLEM    1
 (WARNING  2) NM-TRAN INFERS THAT THE DATA ARE POPULATION.
 (WARNING  48) DES-DEFINED ITEMS ARE COMPUTED ONLY WHEN EVENT TIME
 INCREASES. E.G., DISPLAYED VALUES ASSOCIATED WITH THE FIRST EVENT RECORD
 OF AN INDIVIDUAL RECORD ARE COMPUTED WITH (THE LAST ADVANCE TO) AN EVENT
 TIME OF THE PRIOR INDIVIDUAL RECORD.
 (WARNING  79) SIGMA IS USED ON THE RIGHT. WITH A SUBSEQUENT RUN, IF AN
 INITIAL ESTIMATE OF A DIAGONAL BLOCK OF SIGMA IS TO BE COMPUTED BY
 NONMEM, THAT BLOCK WILL BE SET TO AN IDENTITY MATRIX DURING THAT
 COMPUTATION. THIS COULD LEAD TO AN ARITHMETIC EXCEPTION.*
 * THE MAXIMUM NUMBER OF WARNINGS OF ONE OR MORE TYPES WAS REACHED.
 IT IS POSSIBLE THAT SOME WARNING MESSAGES WERE SUPPRESSED.

1NONLINEAR MIXED EFFECTS MODEL PROGRAM (NONMEM) VERSION 7.4.3
 ORIGINALLY DEVELOPED BY STUART BEAL, LEWIS SHEINER, AND ALISON BOECKMANN
 CURRENT DEVELOPERS ARE ROBERT BAUER, ICON DEVELOPMENT SOLUTIONS,
 AND ALISON BOECKMANN. IMPLEMENTATION, EFFICIENCY, AND STANDARDIZATION
 PERFORMED BY NOUS INFOSYSTEMS.
 PROBLEM NO.:         1
 PBPK Critically ill patients metronidazole study
 TOT. NO. OF OBS RECS:      168
 TOT. NO. OF INDIVIDUALS:        8
 GENERAL NONLINEAR KINETICS MODEL WITH STIFF/NONSTIFF EQUATIONS (LSODA, ADVAN13)
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 #TBLN:      1
 #METH: First Order Conditional Estimation with Interaction
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
 #TERM:
0MINIMIZATION SUCCESSFUL
 HOWEVER, PROBLEMS OCCURRED WITH THE MINIMIZATION.
 REGARD THE RESULTS OF THE ESTIMATION STEP CAREFULLY, AND ACCEPT THEM ONLY
 AFTER CHECKING THAT THE COVARIANCE STEP PRODUCES REASONABLE OUTPUT.
 NO. OF FUNCTION EVALUATIONS USED:      254
 NO. OF SIG. DIGITS IN FINAL EST.:  3.1

 ETABAR IS THE ARITHMETIC MEAN OF THE ETA-ESTIMATES,
 AND THE P-VALUE IS GIVEN FOR THE NULL HYPOTHESIS THAT THE TRUE MEAN IS 0.

 ETABAR:         0.0000E+00 -8.8725E-05  0.0000E+00  0.0000E+00  0.0000E+00  0.0000E+00  0.0000E+00
 SE:             0.0000E+00  1.2315E-01  0.0000E+00  0.0000E+00  0.0000E+00  0.0000E+00  0.0000E+00
 N:                       8           8           8           8           8           8           8

 P VAL.:         1.0000E+00  9.9943E-01  1.0000E+00  1.0000E+00  1.0000E+00  1.0000E+00  1.0000E+00

 ETASHRINKSD(%)  1.0000E+02  1.0000E-10  1.0000E+02  1.0000E+02  1.0000E+02  1.0000E+02  1.0000E+02
 ETASHRINKVR(%)  1.0000E+02  1.0000E-10  1.0000E+02  1.0000E+02  1.0000E+02  1.0000E+02  1.0000E+02
 EBVSHRINKSD(%)  0.0000E+00  8.6716E-01  0.0000E+00  0.0000E+00  0.0000E+00  0.0000E+00  0.0000E+00
 EBVSHRINKVR(%)  0.0000E+00  1.7268E+00  0.0000E+00  0.0000E+00  0.0000E+00  0.0000E+00  0.0000E+00
 EPSSHRINKSD(%)  2.8285E+00  2.8285E+00  1.9252E+00  1.4274E+00
 EPSSHRINKVR(%)  5.5769E+00  5.5769E+00  3.8133E+00  2.8343E+00


 TOTAL DATA POINTS NORMALLY DISTRIBUTED (N):          168
 N*LOG(2PI) CONSTANT TO OBJECTIVE FUNCTION:    308.76334715677001
 OBJECTIVE FUNCTION VALUE WITHOUT CONSTANT:    452.34574347436012
 OBJECTIVE FUNCTION VALUE WITH CONSTANT:       761.10909063113013
 REPORTED OBJECTIVE FUNCTION DOES NOT CONTAIN CONSTANT

 TOTAL EFFECTIVE ETAS (NIND*NETA):                             8


 #TERE:
 Elapsed estimation  time in seconds:   180.42
 Elapsed covariance  time in seconds:   178.79
 Elapsed postprocess time in seconds:     2.07

 ********************               FIRST ORDER CONDITIONAL ESTIMATION WITH INTERACTION              ********************
 #OBJT:**************                       MINIMUM VALUE OF OBJECTIVE FUNCTION                      ********************
 #OBJV:********************************************      452.346       **************************************************

 ********************               FIRST ORDER CONDITIONAL ESTIMATION WITH INTERACTION              ********************
 ********************                             FINAL PARAMETER ESTIMATE                           ********************

 THETA - VECTOR OF FIXED EFFECTS PARAMETERS   *********
         TH 1      TH 2      TH 3      TH 4      TH 5      TH 6      TH 7
         7.96E-01  7.28E+00  8.60E-01  5.85E+00  3.12E+02  6.40E+00  3.20E+00

 OMEGA - COV MATRIX FOR RANDOM EFFECTS - ETAS  ********
         ETA1      ETA2      ETA3      ETA4      ETA5      ETA6      ETA7
 ETA1
+        0.00E+00
 ETA2
+        0.00E+00  1.24E-01
 ETA3
+        0.00E+00  0.00E+00  0.00E+00
 ETA4
+        0.00E+00  0.00E+00  0.00E+00  0.00E+00
 ETA5
+        0.00E+00  0.00E+00  0.00E+00  0.00E+00  0.00E+00
 ETA6
+        0.00E+00  0.00E+00  0.00E+00  0.00E+00  0.00E+00  0.00E+00
 ETA7
+        0.00E+00  0.00E+00  0.00E+00  0.00E+00  0.00E+00  0.00E+00  0.00E+00

 SIGMA - COV MATRIX FOR RANDOM EFFECTS - EPSILONS  ****
         EPS1      EPS2      EPS3      EPS4
 EPS1
+        2.06E-02
 EPS2
+        0.00E+00  1.18E+00
 EPS3
+        0.00E+00  0.00E+00  5.18E-02
 EPS4
+        0.00E+00  0.00E+00  0.00E+00  7.96E-02

 OMEGA - CORR MATRIX FOR RANDOM EFFECTS - ETAS  *******
         ETA1      ETA2      ETA3      ETA4      ETA5      ETA6      ETA7
 ETA1
+        0.00E+00
 ETA2
+        0.00E+00  3.52E-01
 ETA3
+        0.00E+00  0.00E+00  0.00E+00
 ETA4
+        0.00E+00  0.00E+00  0.00E+00  0.00E+00
 ETA5
+        0.00E+00  0.00E+00  0.00E+00  0.00E+00  0.00E+00
 ETA6
+        0.00E+00  0.00E+00  0.00E+00  0.00E+00  0.00E+00  0.00E+00
 ETA7
+        0.00E+00  0.00E+00  0.00E+00  0.00E+00  0.00E+00  0.00E+00  0.00E+00

 SIGMA - CORR MATRIX FOR RANDOM EFFECTS - EPSILONS  ***
         EPS1      EPS2      EPS3      EPS4
 EPS1
+        1.44E-01
 EPS2
+        0.00E+00  1.09E+00
 EPS3
+        0.00E+00  0.00E+00  2.28E-01
 EPS4
+        0.00E+00  0.00E+00  0.00E+00  2.82E-01

 ********************               FIRST ORDER CONDITIONAL ESTIMATION WITH INTERACTION              ********************
 ********************                            STANDARD ERROR OF ESTIMATE                          ********************

 THETA - VECTOR OF FIXED EFFECTS PARAMETERS   *********
         TH 1      TH 2      TH 3      TH 4      TH 5      TH 6      TH 7
         3.63E-01  4.12E+00 ......... ......... ......... ......... .........

 OMEGA - COV MATRIX FOR RANDOM EFFECTS - ETAS  ********
         ETA1      ETA2      ETA3      ETA4      ETA5      ETA6      ETA7
 ETA1
+       .........
 ETA2
+       .........  2.25E-01
 ETA3
+       ......... ......... .........
 ETA4
+       ......... ......... ......... .........
 ETA5
+       ......... ......... ......... ......... .........
 ETA6
+       ......... ......... ......... ......... ......... .........
 ETA7
+       ......... ......... ......... ......... ......... ......... .........

 SIGMA - COV MATRIX FOR RANDOM EFFECTS - EPSILONS  ****
         EPS1      EPS2      EPS3      EPS4
 EPS1
+        3.36E-02
 EPS2
+       .........  1.62E+00
 EPS3
+       ......... .........  1.12E-02
 EPS4
+       ......... ......... .........  1.17E-01

 OMEGA - CORR MATRIX FOR RANDOM EFFECTS - ETAS  *******
         ETA1      ETA2      ETA3      ETA4      ETA5      ETA6      ETA7
 ETA1
+       .........
 ETA2
+       .........  3.19E-01
 ETA3
+       ......... ......... .........
 ETA4
+       ......... ......... ......... .........
 ETA5
+       ......... ......... ......... ......... .........
 ETA6
+       ......... ......... ......... ......... ......... .........
 ETA7
+       ......... ......... ......... ......... ......... ......... .........

 SIGMA - CORR MATRIX FOR RANDOM EFFECTS - EPSILONS  ***
         EPS1      EPS2      EPS3      EPS4
 EPS1
+        1.17E-01
 EPS2
+       .........  7.45E-01
 EPS3
+       ......... .........  2.45E-02
 EPS4
+       ......... ......... .........  2.07E-01
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
 ********************               FIRST ORDER CONDITIONAL ESTIMATION WITH INTERACTION              ********************
 ********************                      EIGENVALUES OF COR MATRIX OF ESTIMATE                     ********************

             1         2         3         4         5         6         7
         2.13E-06  1.14E-03  3.24E-03  3.21E-02  1.38E-01  8.01E-01  6.02E+00
0WARNING: IN TABLE   1, ROW        2, PRED-DEFINED ITEM, NUMBER   9
 IS LARGER THAN  0.3D+39
0WARNING: IN TABLE   1, ROW        2, PRED-DEFINED ITEM, NUMBER   9
 IS LARGER THAN  0.3D+39
0WARNING: IN TABLE   1, ROW        2, PRED-DEFINED ITEM, NUMBER   9
 IS LARGER THAN  0.3D+39
0WARNING: IN TABLE   1, ROW        3, PRED-DEFINED ITEM, NUMBER   9
 IS LARGER THAN  0.3D+39
0WARNING: IN TABLE   1, ROW        3, PRED-DEFINED ITEM, NUMBER   9
 IS LARGER THAN  0.3D+39
0WARNING: IN TABLE   1, ROW        3, PRED-DEFINED ITEM, NUMBER   9
 IS LARGER THAN  0.3D+39
0WARNING: IN TABLE   1, ROW        4, PRED-DEFINED ITEM, NUMBER   9
 IS LARGER THAN  0.3D+39
0WARNING: IN TABLE   1, ROW        4, PRED-DEFINED ITEM, NUMBER   9
 IS LARGER THAN  0.3D+39
0WARNING: IN TABLE   1, ROW        4, PRED-DEFINED ITEM, NUMBER   9
 IS LARGER THAN  0.3D+39
0WARNING: IN TABLE   1, ROW        5, PRED-DEFINED ITEM, NUMBER   9
 IS LARGER THAN  0.3D+39
0WARNING: IN TABLE   1, ROW        5, PRED-DEFINED ITEM, NUMBER   9
 IS LARGER THAN  0.3D+39
0WARNING: IN TABLE   1, ROW        5, PRED-DEFINED ITEM, NUMBER   9
 IS LARGER THAN  0.3D+39
0WARNING: IN TABLE   1, ROW       10, PRED-DEFINED ITEM, NUMBER   9
 IS LARGER THAN  0.3D+39
0WARNING: IN TABLE   1, ROW       10, PRED-DEFINED ITEM, NUMBER   9
 IS LARGER THAN  0.3D+39
0WARNING: IN TABLE   1, ROW       10, PRED-DEFINED ITEM, NUMBER   9
 IS LARGER THAN  0.3D+39
0WARNING: IN TABLE   1, ROW       33, PRED-DEFINED ITEM, NUMBER   9
 IS LARGER THAN  0.3D+39
0WARNING: IN TABLE   1, ROW       33, PRED-DEFINED ITEM, NUMBER   9
 IS LARGER THAN  0.3D+39
0WARNING: IN TABLE   1, ROW       33, PRED-DEFINED ITEM, NUMBER   9
 IS LARGER THAN  0.3D+39
0WARNING: IN TABLE   1, ROW       34, PRED-DEFINED ITEM, NUMBER   9
 IS LARGER THAN  0.3D+39
0WARNING: IN TABLE   1, ROW       34, PRED-DEFINED ITEM, NUMBER   9
 IS LARGER THAN  0.3D+39
0WARNING: IN TABLE   1, ROW       34, PRED-DEFINED ITEM, NUMBER   9
 IS LARGER THAN  0.3D+39
0WARNING: IN TABLE   1, ROW       35, PRED-DEFINED ITEM, NUMBER   9
 IS LARGER THAN  0.3D+39
0WARNING: IN TABLE   1, ROW       35, PRED-DEFINED ITEM, NUMBER   9
 IS LARGER THAN  0.3D+39
0WARNING: IN TABLE   1, ROW       35, PRED-DEFINED ITEM, NUMBER   9
 IS LARGER THAN  0.3D+39
0WARNING: IN TABLE   1, ROW       55, PRED-DEFINED ITEM, NUMBER   9
 IS LARGER THAN  0.3D+39
0WARNING: IN TABLE   1, ROW       55, PRED-DEFINED ITEM, NUMBER   9
 IS LARGER THAN  0.3D+39
0WARNING: IN TABLE   1, ROW       55, PRED-DEFINED ITEM, NUMBER   9
 IS LARGER THAN  0.3D+39
0WARNING: IN TABLE   1, ROW       59, PRED-DEFINED ITEM, NUMBER   9
 IS LARGER THAN  0.3D+39
0WARNING: IN TABLE   1, ROW       59, PRED-DEFINED ITEM, NUMBER   9
 IS LARGER THAN  0.3D+39
0WARNING: IN TABLE   1, ROW       59, PRED-DEFINED ITEM, NUMBER   9
 IS LARGER THAN  0.3D+39
0WARNING: IN TABLE   1, ROW       74, PRED-DEFINED ITEM, NUMBER   9
 IS LARGER THAN  0.3D+39
0WARNING: IN TABLE   1, ROW       74, PRED-DEFINED ITEM, NUMBER   9
 IS LARGER THAN  0.3D+39
0WARNING: IN TABLE   1, ROW       74, PRED-DEFINED ITEM, NUMBER   9
 IS LARGER THAN  0.3D+39
0WARNING: IN TABLE   1, ROW       85, PRED-DEFINED ITEM, NUMBER   9
 IS LARGER THAN  0.3D+39
0WARNING: IN TABLE   1, ROW       85, PRED-DEFINED ITEM, NUMBER   9
 IS LARGER THAN  0.3D+39
0WARNING: IN TABLE   1, ROW       85, PRED-DEFINED ITEM, NUMBER   9
 IS LARGER THAN  0.3D+39
0WARNING: IN TABLE   1, ROW      105, PRED-DEFINED ITEM, NUMBER   9
 IS LARGER THAN  0.3D+39
0WARNING: IN TABLE   1, ROW      105, PRED-DEFINED ITEM, NUMBER   9
 IS LARGER THAN  0.3D+39
0WARNING: IN TABLE   1, ROW      105, PRED-DEFINED ITEM, NUMBER   9
 IS LARGER THAN  0.3D+39
0WARNING: IN TABLE   1, ROW      110, PRED-DEFINED ITEM, NUMBER   9
 IS LARGER THAN  0.3D+39
0WARNING: IN TABLE   1, ROW      110, PRED-DEFINED ITEM, NUMBER   9
 IS LARGER THAN  0.3D+39
0WARNING: IN TABLE   1, ROW      110, PRED-DEFINED ITEM, NUMBER   9
 IS LARGER THAN  0.3D+39
0WARNING: IN TABLE   1, ROW      156, PRED-DEFINED ITEM, NUMBER   9
 IS LARGER THAN  0.3D+39
0WARNING: IN TABLE   1, ROW      156, PRED-DEFINED ITEM, NUMBER   9
 IS LARGER THAN  0.3D+39
0WARNING: IN TABLE   1, ROW      156, PRED-DEFINED ITEM, NUMBER   9
 IS LARGER THAN  0.3D+39
0WARNING: IN TABLE   1, ROW      161, PRED-DEFINED ITEM, NUMBER   9
 IS LARGER THAN  0.3D+39
0WARNING: IN TABLE   1, ROW      161, PRED-DEFINED ITEM, NUMBER   9
 IS LARGER THAN  0.3D+39
0WARNING: IN TABLE   1, ROW      161, PRED-DEFINED ITEM, NUMBER   9
 IS LARGER THAN  0.3D+39
0WARNING: IN TABLE   2, ROW        2, PRED-DEFINED ITEM, NUMBER   9
 IS LARGER THAN  0.3D+39
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 Elapsed finaloutput time in seconds:     0.34
 #CPUT: Total CPU Time in Seconds,      362.734
